FINISH

/CLEAR


L = 1

STRETCH = 0.01


/PREP7
ET,1,SOLID185
*
KEYOPT,1,2,1
KEYOPT,1,3,0
KEYOPT,1,6,0
KEYOPT,1,8,0
!*

YOUNG = 210e3
POISSON = 0.33
T1 = 1


TB,USER,1,1,2,
TBTEMP,T1
TBDATA,,YOUNG,POISSON
TB,STATE,1,,1


MAT,1
TYPE,1

BLC4,0,0,L,L,L
ESIZE,,L
VMESH,1

NSEL,S,LOC,X,0
D,ALL,UX
NSEL,ALL

NSEL,S,LOC,Y,0
D,ALL,UY
NSEL,ALL

NSEL,S,LOC,Z,0
D,ALL,UZ
NSEL,ALL


/SOL
!*
ANTYPE,0
NSUBST,100,100,100
OUTRES,ERASE
OUTRES,ALL,ALL
OUTRES,SVAR,ALL,,NSVAR
TIME,1


NSEL,S,LOC,X,L
D,ALL,UX,STRETCH
!*NSEL,S,LOC,Y,L
!*D,ALL,UY,STRETCH
NSEL,ALL

/SOL
/STATUS,SOLU
SOLVE


FINISH
