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/CLEAR,START
/COM,ANSYS RELEASE Release 19.1      BUILD 19.1      UP20180418       13:24:21
/input,start,ans,'C:\Program Files\ANSYS Inc\v191\ANSYS\apdl\'
/PREP7
ET,1,PLANE182
ERESX,NO
KEYOPT,1,1,0
KEYOPT,1,3,3
KEYOPT,1,6,0
R,1,0.1,
ET,2,MASS21
R,2,0.001,0.001,0.001, , , ,

T1 = 1
TB,USER,1,1,4,4
TBTEMP,T1
TBDATA,,55000e6,9500e6,0.33,5500e6
TB,STATE,1,,5


BLC4, , ,1,0.5
NUMSTR,NODE,50,
NUMSTR,ELEM,1,
NUMSTR,KP,1,
NUMSTR,LINE,1,
NUMSTR,AREA,1,
NUMSTR,VOLU,1,


FLST,5,2,4,ORDE,2
FITEM,5,1
FITEM,5,3
CM,_Y,LINE
LSEL, , , ,P51X
CM,_Y1,LINE
CMSEL,,_Y
LESIZE,_Y1, , ,1, , , , ,1
FLST,5,2,4,ORDE,2
FITEM,5,2
FITEM,5,4
CM,_Y,LINE
LSEL, , , ,P51X
CM,_Y1,LINE
CMSEL,,_Y
LESIZE,_Y1, , ,1, , , , ,1
MSHAPE,0,2D
MSHKEY,0
CM,_Y,AREA
ASEL, , , ,       1
CM,_Y1,AREA
CHKMSH,'AREA'
CMSEL,S,_Y
AMESH,_Y1
CMDELE,_Y
CMDELE,_Y1
CMDELE,_Y2

N,1,1.2,0.25,,,,,
TYPE,   2
MAT,       1
REAL,       2
ESYS,       0
SECNUM,
TSHAP,LINE
E,       1
EPLOT
FLST,5,2,1,ORDE,2
FITEM,5,51
FITEM,5,-52
CM,_NODECM,NODE
*SET,_z1,       1
NSEL,S, , ,P51X
NSEL,A, , ,_Z1
CM,_CERGCM,NODE
CMSEL,S,_NODECM
CMSEL,S,_CERGCM
CERIG,1,ALL,ALL, , , ,
CMSEL,S,_NODECM


esel,all,ELEM
*get,elemCount,ELEM,,COUNT
*vget,elemList,ELEM,,ELIST


*do,iterator,1,elemCount,1
	esel,none
	esel,ALL,ELEM,,elemList(%iterator%)
	*get,elemvol,ELEM,elemList(%iterator%),VOLU
	inistate,set,dtype,svar
	inistate,defi,elemList(%iterator%),ALL,,,%elemvol/4%
*enddo
FINISH


/SOL
ANTYPE,0
NSUBST,100,1000,100
OUTRES,ERASE
OUTRES,ALL,ALL
OUTRES,SVAR,ALL,,NSVAR
TIME,1
FLST,2,1,4,ORDE,1
FITEM,2,4
/GO
DL,P51X, ,ALL,
FLST,2,1,1,ORDE,1
FITEM,2,1
/GO
D,P51X, , , , , ,UY, , , , ,
FLST,2,1,1,ORDE,1
FITEM,2,1
/GO
D,P51X, ,0.2, , , ,UX, , , , ,


/STATUS,SOLU
SOLVE
