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/CLEAR,START
/COM,ANSYS RELEASE Release 19.1      BUILD 19.1      UP20180418       14:40:12
/input,start,ans,'C:\Program Files\ANSYS Inc\v191\ANSYS\apdl\'
/COM,ANSYS RELEASE Release 19.1      BUILD 19.1      UP20180418       14:40:34


/PREP7
ERESX,YES
ET,1,SOLID185
T1 = 1
TB,USER,1,1,9,9
TBTEMP,T1
TBDATA,,55000e6,9500e6,9500e6,0.33,0.27,0.33,5500e6,3000e6,5500e6
TB,STATE,1,,6


K,1,,,,
K,2,3,,1,
K,3,6,,,
K,4,,,3,
K,5,3,,2,
K,6,6,,3,


FINISH
/SOL
FINISH
/PREP7
FLST,2,6,3
FITEM,2,1
FITEM,2,2
FITEM,2,3
FITEM,2,6
FITEM,2,5
FITEM,2,4
A,P51X
FLST,2,1,5,ORDE,1
FITEM,2,1
VEXT,P51X, , ,0,1,0,,,,
LESIZE,ALL, , ,4, ,1, , ,1,
CM,_Y,VOLU
VSEL, , , ,       1
CM,_Y1,VOLU
CHKMSH,'VOLU'
CMSEL,S,_Y
VSWEEP,_Y1
CMDELE,_Y
CMDELE,_Y1
CMDELE,_Y2


FINISH
/SOL
ANTYPE,0
NSUBST,200,1000,1
OUTRES,ERASE
OUTRES,ALL,ALL
OUTRES,SVAR,ALL,,NSVAR
TIME,1
FLST,2,1,4,ORDE,1
FITEM,2,9
/GO
DL,P51X, ,UY,
FLST,2,1,4,ORDE,1
FITEM,2,15
/GO
DL,P51X, ,UZ,
FLST,2,1,1,ORDE,1
FITEM,2,11
/GO
D,P51X, , , , , ,UY,UZ, , , ,
FLST,2,1,5,ORDE,1
FITEM,2,5
/GO
DA,P51X,UX,0.2
FLST,2,1,4,ORDE,1
FITEM,2,12
/GO
DL,P51X, ,UY,
FLST,2,1,4,ORDE,1
FITEM,2,13
/GO
DL,P51X, ,UZ,
FLST,2,1,1,ORDE,1
FITEM,2,16
/GO
D,P51X, , , , , ,UY,UZ, , , ,
FLST,2,1,5,ORDE,1
FITEM,2,8
/GO
DA,P51X,UX,0
/STATUS,SOLU
SOLVE
