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/CLEAR,START
/COM,ANSYS RELEASE Release 19.1      BUILD 19.1      UP20180418       17:13:38
/input,start,ans,'C:\Program Files\ANSYS Inc\v191\ANSYS\apdl\'
!!!!!!!!!!!!!!!!!!!!!!!!!!!!!  isotrpic damage meshed
/COM,ANSYS RELEASE Release 19.1      BUILD 19.1      UP20180418       16:00:26
/input,start,ans,'C:\Program Files\ANSYS Inc\v191\ANSYS\apdl\'
!!!!!!!!!!!!!!!!!!!!!!!!!!!!!!   isotropic damage
/NOPR
KEYW,PR_SET,1
KEYW,PR_STRUC,1
KEYW,PR_THERM,0
KEYW,PR_FLUID,0
KEYW,PR_ELMAG,0
KEYW,MAGNOD,0
KEYW,MAGEDG,0
KEYW,MAGHFE,0
KEYW,MAGELC,0
KEYW,PR_MULTI,0
/GO
/COM,
/COM,Preferences for GUI filtering have been set to display:
/COM,  Structural
/PREP7
ERESX,NO
ET,1,SOLID185
KEYOPT,1,2,0
KEYOPT,1,3,0
KEYOPT,1,6,0
KEYOPT,1,8,0
T1 = 1
TB,USER,1,1,9,9
TBTEMP,T1
TBDATA,,55000e6,9500e6,9500e6,0.33,0.27,0.33,5500e6,3000e6,5500e6
TB,STATE,1,,7


K,1,,,,
K,2,,1,,
K,3,10,1,,
K,4,10,,,
FLST,2,4,3
FITEM,2,1
FITEM,2,2
FITEM,2,3
FITEM,2,4
A,P51X
FLST,2,1,5,ORDE,1
FITEM,2,1
VEXT,P51X, , ,0,0,1,,,,
FLST,5,4,4,ORDE,4
FITEM,5,2
FITEM,5,4
FITEM,5,6
FITEM,5,8
CM,_Y,LINE
LSEL, , , ,P51X
CM,_Y1,LINE
CMSEL,,_Y
LESIZE,_Y1, , ,5, , , , ,1
FLST,5,8,4,ORDE,6
FITEM,5,1
FITEM,5,3
FITEM,5,5
FITEM,5,7
FITEM,5,9
FITEM,5,-12
CM,_Y,LINE
LSEL, , , ,P51X
CM,_Y1,LINE
CMSEL,,_Y
LESIZE,_Y1, , ,3, , , , ,1
MSHAPE,0,3D
MSHKEY,1
CM,_Y,VOLU
VSEL, , , ,       1
CM,_Y1,VOLU
CHKMSH,'VOLU'
CMSEL,S,_Y
VMESH,_Y1
CMDELE,_Y
CMDELE,_Y1
CMDELE,_Y2
esel,all,ELEM
*get,elemCount,ELEM,,COUNT
*vget,elemList,ELEM,,ELIST


*do,iterator,1,elemCount,1
	esel,none
	esel,ALL,ELEM,,elemList(%iterator%)
	*get,elemvol,ELEM,elemList(%iterator%),VOLU
	inistate,set,dtype,svar
	inistate,defi,elemList(%iterator%),ALL,,,%elemvol/8%
*enddo
FINISH
!!!!!!!!!!!!!!!!!!!!!!  Note
/SOLU
ANTYPE,0
NSUBST,100,1000,100
OUTRES,ERASE
OUTRES,ALL,ALL
OUTRES,SVAR,ALL,,NSVAR
TIME,1
/STATUS,SOLU
FLST,2,1,1,ORDE,1
FITEM,2,1
/GO
D,P51X, ,0, , , ,ALL, , , , ,
FLST,2,1,4,ORDE,1
FITEM,2,1
/GO
DL,P51X, ,UX,0
FLST,2,1,4,ORDE,1
FITEM,2,1
/GO
DL,P51X, ,UZ,0
FLST,2,1,4,ORDE,1
FITEM,2,9
/GO
DL,P51X, ,UX,0
FLST,2,1,4,ORDE,1
FITEM,2,9
/GO
DL,P51X, ,UY,0
FLST,2,1,5,ORDE,1
FITEM,2,3
/GO
DA,P51X,UX,0
FLST,2,1,5,ORDE,1
FITEM,2,5
/GO
DA,P51X,UX,2
/STATUS,SOLU
SOLVE
