/CLEAR,START


/COM,Preferences for GUI filtering have been set to display:
/COM,  Structural
!*
/PREP7

ERESX,NO
!*
/PREP7
!*
ET,1,PLANE182
!*
KEYOPT,1,1,0
KEYOPT,1,3,0
KEYOPT,1,6,0

ET,2,MASS21
!*
R,2,0.001,0.001,0.001, , , ,
!*
!*
!*
ET,3,SOLID186
!*

T1 = 1
TB,USER,1,1,9,9
TBTEMP,T1
TBDATA,,55000e6,9500e6,9500e6,0.33,0.27,0.33,5500e6,3000e6,5500e6
TB,STATE,1,,7


BLC4, , ,0.02,0.02
CYL4, , ,0.003
ASBA,       1,       2

!*
FLST,5,1,4,ORDE,1
FITEM,5,5
CM,_Y,LINE
LSEL, , , ,P51X
CM,_Y1,LINE
CMSEL,,_Y
!*
LESIZE,_Y1, , ,20, , , , ,1
!*
FLST,5,1,4,ORDE,1
FITEM,5,3
CM,_Y,LINE
LSEL, , , ,P51X
CM,_Y1,LINE
CMSEL,,_Y
!*
LESIZE,_Y1, , ,10, , , , ,1
!*
FLST,5,1,4,ORDE,1
FITEM,5,2
CM,_Y,LINE
LSEL, , , ,P51X
CM,_Y1,LINE
CMSEL,,_Y
!*
LESIZE,_Y1, , ,10, , , , ,1
!*
FLST,5,1,4,ORDE,1
FITEM,5,9
CM,_Y,LINE
LSEL, , , ,P51X
CM,_Y1,LINE
CMSEL,,_Y
!*
LESIZE,_Y1, , ,10, , , , ,1
!*
FLST,5,1,4,ORDE,1
FITEM,5,10
CM,_Y,LINE
LSEL, , , ,P51X
CM,_Y1,LINE
CMSEL,,_Y
!*
LESIZE,_Y1, , ,10, , , , ,1
!*
FLST,2,2,4,ORDE,2
FITEM,2,2
FITEM,2,-3
LCCAT,P51X
MSHAPE,0,2D
MSHKEY,1
!*
CM,_Y,AREA
ASEL, , , ,       3
CM,_Y1,AREA
CHKMSH,'AREA'
CMSEL,S,_Y
!*
AMESH,_Y1
!*
CMDELE,_Y
CMDELE,_Y1
CMDELE,_Y2
!*
/UI,MESH,OFF
NUMMRG,NODE


esel,all,ELEM
*get,elemCount,ELEM,,COUNT
*vget,elemList,ELEM,,ELIST


*do,iterator,1,elemCount,1
	esel,none
	esel,ALL,ELEM,,elemList(%iterator%)
	*get,elemvol,ELEM,elemList(%iterator%),VOLU
	inistate,set,dtype,svar
	inistate,defi,elemList(%iterator%),ALL,,,%elemvol%
*enddo
FINISH

/SOL
!*
ANTYPE,0
NSUBST,500,1000000,500
OUTRES,ERASE
OUTRES,ALL,ALL
OUTRES,SVAR,ALL,,NSVAR
EQSLV,PCG,1E-8
NLGEOM,0
LNSRCH,1
!PRED,ON,,ON
!STAOPT,VT
!RATE,1
!STABILIZE,REDUCE,DAMPING,1e-4,NO
TIME,1
ALLSEL,ALL

/STATUS,SOLU
SOLVE
