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!!!!!!!!!!!!!!!!!!!  CT SPECIMEN
/CLEAR,START
/COM,ANSYS RELEASE Release 19.1      BUILD 19.1      UP20180418       11:58:57
/input,start,ans,'C:\Program Files\ANSYS Inc\v191\ANSYS\apdl\'
/NOPR
KEYW,PR_SET,1
KEYW,PR_STRUC,1
KEYW,PR_THERM,0
KEYW,PR_FLUID,0
KEYW,PR_ELMAG,0
KEYW,MAGNOD,0
KEYW,MAGEDG,0
KEYW,MAGHFE,0
KEYW,MAGELC,0
KEYW,PR_MULTI,0
/GO
/COM,
/COM,Preferences for GUI filtering have been set to display:
/COM,  Structural
/PREP7
ET,1,PLANE182
KEYOPT,1,1,0
KEYOPT,1,3,3
KEYOPT,1,6,0
R,1,0.0038,
ET,2,MASS21
R,2,0.001,0.001,0.001, , , ,

MPTEMP,,,,,,,,
MPTEMP,1,0
MPDATA,EX,1,,210e9
MPDATA,PRXY,1,,0.33

MPTEMP,,,,,,,,
MPTEMP,1,0
MPDATA,EX,2,,210e13
MPDATA,PRXY,2,,0.33



K,1,0.0005,,,
K,2,0.0005,0.0175,,
K,3,0.0005,0.0225,,
K,4,,0.0225,,
K,5,,0.0625,,
K,6,0.0005,0.0625,,
K,7,0.0075,0.0625,,
K,8,0.03,0.0625,,
K,9,0.03,0.0225,,
K,10,0.03,,,
K,11,0.0075,0.0175,,
K,12,0.0075,0.0225,,
K,13,0.01625,0.0125,,

FLST,2,4,3
FITEM,2,4
FITEM,2,3
FITEM,2,6
FITEM,2,5
A,P51X
FLST,2,4,3
FITEM,2,3
FITEM,2,12
FITEM,2,7
FITEM,2,6
A,P51X
FLST,2,4,3
FITEM,2,3
FITEM,2,2
FITEM,2,11
FITEM,2,12
A,P51X
FLST,2,4,3
FITEM,2,12
FITEM,2,9
FITEM,2,8
FITEM,2,7
A,P51X
FLST,2,6,3
FITEM,2,1
FITEM,2,2
FITEM,2,11
FITEM,2,12
FITEM,2,9
FITEM,2,10
A,P51X


CYL4,0.01625,0.0125,0.0065
NUMSTR,NODE,50,
NUMSTR,ELEM,1,
NUMSTR,KP,1,
NUMSTR,LINE,1,
NUMSTR,AREA,1,
NUMSTR,VOLU,1,
