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!!!!!!!!!!!!!!!!!!!  CT SPECIMEN
/CLEAR,START
/COM,ANSYS RELEASE Release 19.1      BUILD 19.1      UP20180418       11:58:57
/input,start,ans,'C:\Program Files\ANSYS Inc\v191\ANSYS\apdl\'
/NOPR
KEYW,PR_SET,1
KEYW,PR_STRUC,1
KEYW,PR_THERM,0
KEYW,PR_FLUID,0
KEYW,PR_ELMAG,0
KEYW,MAGNOD,0
KEYW,MAGEDG,0
KEYW,MAGHFE,0
KEYW,MAGELC,0
KEYW,PR_MULTI,0
/GO
/COM,
/COM,Preferences for GUI filtering have been set to display:
/COM,  Structural
/PREP7
ERESX,NO
ET,1,PLANE182
KEYOPT,1,1,0
KEYOPT,1,3,3
KEYOPT,1,6,0
R,1,0.0038,
ET,2,MASS21
R,2,0.001,0.001,0.001, , , ,

!MPTEMP,,,,,,,,
!MPTEMP,1,0
!MPDATA,EX,1,,55000e6
!MPDATA,PRXY,1,,0.3

T1 = 1
TB,USER,1,1,4,4
TBTEMP,T1
TBDATA,,55000e6,9500e6,0.33,5500e6
TB,STATE,1,,5




K,1,0.0005,,,
K,2,0.0005,0.0175,,
K,3,0.0005,0.0225,,
K,4,,0.0245,,
K,5,,0.0625,,
K,6,0.0005,0.0625,,
K,7,0.0075,0.0625,,
K,8,0.03,0.0625,,
K,9,0.03,0.0225,,
K,10,0.03,,,
K,11,0.0075,0.0175,,
K,12,0.0075,0.0225,,
K,13,0.01625,0.0125,,


NUMSTR,NODE,50,
NUMSTR,ELEM,1,
NUMSTR,KP,1,
NUMSTR,LINE,1,
NUMSTR,AREA,1,
NUMSTR,VOLU,1,


esel,all,ELEM
*get,elemCount,ELEM,,COUNT
*vget,elemList,ELEM,,ELIST


*do,iterator,1,elemCount,1
	esel,none
	esel,ALL,ELEM,,elemList(%iterator%)
	*get,elemvol,ELEM,elemList(%iterator%),VOLU
	inistate,set,dtype,svar
	inistate,defi,elemList(%iterator%),ALL,,,%elemvol/4%
*enddo
FINISH

/SOL
ANTYPE,0
NSUBST,100,1000,100
OUTRES,ERASE
OUTRES,ALL,ALL
OUTRES,SVAR,ALL,,NSVAR
TIME,1
ALLSEL,ALL

FLST,2,1,4,ORDE,1
FITEM,2,4
/GO
DL,P51X, ,UX,
FLST,2,1,1,ORDE,1
FITEM,2,83
/GO
D,P51X, , , , , ,UX,UY, , , ,
FLST,2,1,1,ORDE,1
FITEM,2,1
/GO
D,P51X, , , , , ,UY, , , , ,
FLST,2,1,1,ORDE,1
FITEM,2,1
/GO
D,P51X, ,0.008, , , ,UX, , , , ,
/STATUS,SOLU
SOLVE
