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/CLEAR,START
/COM,ANSYS RELEASE Release 19.1      BUILD 19.1      UP20180418       14:40:12
/input,start,ans,'C:\Program Files\ANSYS Inc\v191\ANSYS\apdl\'
/COM,ANSYS RELEASE Release 19.1      BUILD 19.1      UP20180418       14:40:34


/PREP7
ERESX,NO
ET,1,SOLID185
T1 = 1
TB,USER,1,1,9,9
TBTEMP,T1
TBDATA,,55000e6,9500e6,9500e6,0.33,0.27,0.33,5500e6,3000e6,5500e6
TB,STATE,1,,6


K,1,,,,
K,2,3,,1,
K,3,6,,,
K,4,,,3,
K,5,3,,2,
K,6,6,,3,
LSTR,       1,       4
LSTR,       3,       6
LARC,       1,       3,       2
LARC,       4,       6,       5
FLST,2,4,4
FITEM,2,1
FITEM,2,3
FITEM,2,2
FITEM,2,4
AL,P51X
FLST,2,1,5,ORDE,1
FITEM,2,1
VEXT,P51X, , ,0,1,0,,,,


FLST,5,4,4,ORDE,4
FITEM,5,3
FITEM,5,-4
FITEM,5,6
FITEM,5,8
CM,_Y,LINE
LSEL, , , ,P51X
CM,_Y1,LINE
CMSEL,,_Y
LESIZE,_Y1, , ,21, , , , ,1
FLST,5,4,4,ORDE,4
FITEM,5,1
FITEM,5,-2
FITEM,5,5
FITEM,5,7
CM,_Y,LINE
LSEL, , , ,P51X
CM,_Y1,LINE
CMSEL,,_Y
LESIZE,_Y1, , ,5, , , , ,1
FLST,5,4,4,ORDE,2
FITEM,5,9
FITEM,5,-12
CM,_Y,LINE
LSEL, , , ,P51X
CM,_Y1,LINE
CMSEL,,_Y
LESIZE,_Y1, , ,3, , , , ,1
CM,_Y,VOLU
VSEL, , , ,       1
CM,_Y1,VOLU
CHKMSH,'VOLU'
CMSEL,S,_Y
VSWEEP,_Y1
CMDELE,_Y
CMDELE,_Y1
CMDELE,_Y2
FINISH
/SOL
ANTYPE,0
NSUBST,100,1000,100
OUTRES,ERASE
OUTRES,ALL,ALL
OUTRES,SVAR,ALL,,NSVAR
TIME,1
FLST,2,1,4,ORDE,1
FITEM,2,7
/GO
DL,P51X, ,UY,
FLST,2,1,4,ORDE,1
FITEM,2,11
/GO
DL,P51X, ,UZ,
FLST,2,1,5,ORDE,1
FITEM,2,5
/GO
DA,P51X,UX,0.2
FLST,2,1,4,ORDE,1
FITEM,2,5
/GO
DL,P51X, ,UY,
FLST,2,1,4,ORDE,1
FITEM,2,10
/GO
DL,P51X, ,UZ,
FLST,2,1,5,ORDE,1
FITEM,2,3
/GO
DA,P51X,UX,
/STATUS,SOLU
SOLVE
