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/CLEAR,START
/COM,ANSYS RELEASE Release 19.1      BUILD 19.1      UP20180418       18:08:56
/input,start,ans,'C:\Program Files\ANSYS Inc\v191\ANSYS\apdl\'
!!!!!!!!!!!!!!!!!!!!!!!!!!!!!!!! 10m 1 element just elastic
/NOPR
KEYW,PR_SET,1
KEYW,PR_STRUC,1
KEYW,PR_THERM,0
KEYW,PR_FLUID,0
KEYW,PR_ELMAG,0
KEYW,MAGNOD,0
KEYW,MAGEDG,0
KEYW,MAGHFE,0
KEYW,MAGELC,0
KEYW,PR_MULTI,0
/GO
/COM,
/COM,Preferences for GUI filtering have been set to display:
/COM,  Structural
/PREP7
ERESX,YES
ET,1,SOLID185
YOUNG = 200e6
POISSON = 0.3
T1 = 1

TB,USER,1,1,2,
TBTEMP,T1
TBDATA,,YOUNG,POISSON

DT_INI = 0.1
DT_MIN = 0.1
DT_MAX = 0.1

K,1,,,,
K,2,,1,,
K,3,10,1,,
K,4,10,,,
LSTR,       1,       2
LDELE,       1
FLST,2,4,3
FITEM,2,1
FITEM,2,2
FITEM,2,3
FITEM,2,4
A,P51X
FLST,2,1,5,ORDE,1
FITEM,2,1
VEXT,P51X, , ,0,0,1,,,,
TYPE,   1
MAT,       1
REAL,
ESYS,       0
SECNUM,
LESIZE,ALL, , ,1, ,1, , ,1,
MSHAPE,0,3D
MSHKEY,1
CM,_Y,VOLU
VSEL, , , ,       1
CM,_Y1,VOLU
CHKMSH,'VOLU'
CMSEL,S,_Y
VMESH,_Y1
CMDELE,_Y
CMDELE,_Y1
CMDELE,_Y2
FINISH
/SOL
ANTYPE,0
FLST,2,4,1,ORDE,4
FITEM,2,1
FITEM,2,-2
FITEM,2,5
FITEM,2,-6
/GO
D,P51X, , , , , ,ALL, , , , ,
FLST,2,4,1,ORDE,4
FITEM,2,3
FITEM,2,-4
FITEM,2,7
FITEM,2,-8
/GO
F,P51X,FX,250
/STATUS,SOLU
OUTRES,ALL,ALL
OUTRES,SVAR,ALL

ANTYPE,0
NLGEOM,ON
OUTRES,ALL,1
AUTOTS,ON
DELTIM,DT_INI,DT_MIN,DT_MAX,OFF
TIME,1
SOLVE
FINISH
/POST1
/EFACET,1
PLNSOL, U,X, 0,1.0
/EFACET,1
PLNSOL, S,X, 0,1.0
/EFACET,1
PLNSOL, S,EQV, 0,1.0
