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/CLEAR,START
/COM,ANSYS RELEASE Release 19.2      BUILD 19.2      UP20180808       14:29:41
/input,start,ans,'C:\Program Files\ANSYS\ANSYS Inc\v192\ANSYS\apdl\'
/COM,ANSYS RELEASE Release 19.2      BUILD 19.2      UP20180808       14:12:38
/input,start,ans,'C:\Program Files\ANSYS\ANSYS Inc\v192\ANSYS\apdl\'
!!!!!!!!!!!!!!!!!!!!!!!!!!!!!    Pure tensile load on a cube
/NOPR
KEYW,PR_SET,1
KEYW,PR_STRUC,1
KEYW,PR_THERM,0
KEYW,PR_FLUID,0
KEYW,PR_ELMAG,0
KEYW,MAGNOD,0
KEYW,MAGEDG,0
KEYW,MAGHFE,0
KEYW,MAGELC,0
KEYW,PR_MULTI,0
/GO
/COM,
/COM,Preferences for GUI filtering have been set to display:
/COM,  Structural
/PREP7
ET,1,SOLID185
MPTEMP,,,,,,,,
MPTEMP,1,0
MPDATA,EX,1,,200e6
MPDATA,PRXY,1,,0.3
TB,BISO,1,1,2,
TBTEMP,0
TBDATA,,207e6,0,,,,
K,1,,,,
K,2,,1,,
K,3,1,1,,
K,4,1,0,,
FLST,2,4,3
FITEM,2,1
FITEM,2,2
FITEM,2,3
FITEM,2,4
A,P51X
FLST,2,1,5,ORDE,1
FITEM,2,1
VEXT,P51X, , ,0,0,1,,,,
LESIZE,ALL, , ,1, ,1, , ,1,
MSHAPE,0,3D
MSHKEY,1
CM,_Y,VOLU
VSEL, , , ,       1
CM,_Y1,VOLU
CHKMSH,'VOLU'
CMSEL,S,_Y
VMESH,_Y1
CMDELE,_Y
CMDELE,_Y1
CMDELE,_Y2
FINISH
/SOL
ANTYPE,0
NSUBST,100,100,100
OUTRES,ERASE
OUTRES,ALL,ALL
TIME,1
FLST,2,4,1,ORDE,4
FITEM,2,1
FITEM,2,-2
FITEM,2,5
FITEM,2,-6
/GO
D,P51X, , , , , ,ALL, , , , ,
FLST,2,4,1,ORDE,4
FITEM,2,3
FITEM,2,-4
FITEM,2,7
FITEM,2,-8
ANTYPE,0
FLST,2,4,1,ORDE,4
FITEM,2,1
FITEM,2,3
FITEM,2,-4
FITEM,2,8
/GO
D,P51X, ,1, , , ,UY, , , , ,
/STATUS,SOLU
SOLVE
FINISH
/POST1
PLDISP,1
/EFACET,1
PLNSOL, U,Y, 0,1.0
/EFACET,1
PLNSOL, U,X, 0,1.0
/EFACET,1
PLNSOL, S,XY, 0,1.0
/EFACET,1
PLNSOL, S,X, 0,1.0
/EFACET,1
PLNSOL, EPEL,XY, 0,1.0
/EFACET,1
PLNSOL, EPEL,X, 0,1.0
/EFACET,1
PLNSOL, S,XY, 0,1.0
