FINISH

/CLEAR
L = 1                ! Dimensions
STRETCH = 0.01
/PREP7
ET,1,SOLID185        ! Element type
*
KEYOPT,1,2,1
KEYOPT,1,3,0
KEYOPT,1,6,0
KEYOPT,1,8,0
!*
YOUNG = 210e3        ! Material Properties
POISSON = 0.33
T1 = 1

MPTEMP,,,,,,,,       ! Material model
MPTEMP,1,0
MPDATA,EX,1,,200e6
MPDATA,PRXY,1,,0.3
MAT,1
TYPE,1

BLC4,0,0,L,L,L       ! Geometry
ESIZE,,L
VMESH,1

NSEL,S,LOC,X,0       ! Boundary conditions
D,ALL,UX
NSEL,ALL

NSEL,S,LOC,Y,0
D,ALL,UY
NSEL,ALL

NSEL,S,LOC,Z,0
D,ALL,UZ
NSEL,ALL


/SOL
!*
ANTYPE,0
NSUBST,100,100,100
OUTRES,ERASE
OUTRES,ALL,ALL
OUTRES,SVAR,ALL,,NSVAR
TIME,1


NSEL,S,LOC,X,L
D,ALL,UX,STRETCH
!*NSEL,S,LOC,Y,L
!*D,ALL,UY,STRETCH
NSEL,ALL

/SOL
/STATUS,SOLU
SOLVE


FINISH
